# OpenSim document version 40000
Model tensegrity_snake:
  credits: Author: Victoria Ly
  length_units: meters
  force_units: N
  gravity: 0 -9.80665 0
  BodySet:
    Body ground: mass=0 mass_center=(0 0 0) inertia_xx=1 inertia_yy=1 inertia_zz=1 meshes=checkered_floor.vtp
    Body b0s4: mass=0 mass_center=(0.065 -0.038 -0.038) inertia_xx=1 inertia_yy=1 inertia_zz=1 meshes=V3_snek.stl
      WeldJoint block_0_to_ground: parent_body=ground location_in_parent=(0 0.35 0)
          orientation_in_parent=(2.356194 0 0) location=(0 0 0)
    Body b0s3: mass=2 mass_center=(0 0 0) inertia_xx=0.1333333 inertia_yy=0.1333333 inertia_zz=0.1333333
        meshes=V3_snek.stl
      WeldJoint b0s3_to_b0s4: parent_body=b0s4 location_in_parent=(0 -0.002 -0.055)
          orientation_in_parent=(1.570796 0 0) location=(0 0 0)
    Body b0s2: mass=2 mass_center=(0 0 0) inertia_xx=0.1333333 inertia_yy=0.1333333 inertia_zz=0.1333333
        meshes=V3_snek.stl
      WeldJoint b0s2_to_b0s3: parent_body=b0s3 location_in_parent=(0 -0.002 -0.055)
          orientation_in_parent=(1.570796 0 0) location=(0 0 0)
    Body b0s1: mass=2 mass_center=(0 0 0) inertia_xx=0.1333333 inertia_yy=0.1333333 inertia_zz=0.1333333
        meshes=V3_snek.stl
      WeldJoint b0s1_to_b0s2: parent_body=b0s2 location_in_parent=(0 -0.002 -0.055)
          orientation_in_parent=(1.570796 0 0) location=(0 0 0)
    Body b1s1: mass=2 mass_center=(-0.031 0 -0.033) inertia_xx=0.1333333 inertia_yy=0.1333333 inertia_zz=0.1333333
        meshes=V3_snek.stl
      CustomJoint b1s1_to_b0s1: parent_body=b0s1 location_in_parent=(0 0 0.0845) location=(0 0 0)
        Coordinate block1Rotation: motion_type=rotational default_value=0 range=(-0.523599 0.523599) clamped=false
        Coordinate verticalTranslationBlock1RelativeToBlock0: motion_type=translational default_value=0.06
            range=(0.026 0.07) clamped=false
        SpatialTransform: axes_held_at_zero=(rotation2 rotation3 translation2 translation3)
          TransformAxis rotation1: coordinates=block1Rotation axis=(1 0 0) LinearFunction(coefficients=1 0)
          TransformAxis translation1: coordinates=verticalTranslationBlock1RelativeToBlock0 axis=(0 -1 -1)
              LinearFunction(coefficients=1 0)
    Body b1s2: mass=2 mass_center=(-0.031 0 -0.033) inertia_xx=0.1333333 inertia_yy=0.1333333 inertia_zz=0.1333333
        meshes=(SnakeBox 4 sides v3.stl)
      WeldJoint b1s2_to_b1s1: parent_body=b1s1 location_in_parent=(-0.06325 -0.0075 -0.0025)
          orientation_in_parent=(-1.570796 0 0) location=(0 0 0)
    # Rest of Code
