# OpenSim document version 3000
ForceSet tensegrity_snake_CMC:
  defaults: CoordinateActuator default: optimal_force=1000
  # translation
  CoordinateActuator bottom_center_reserve: coordinate=rib1_tx optimal_force=1
  # rotation
  CoordinateActuator bottom_right_reserve: coordinate=rib1_rotation optimal_force=1
