# OpenSim document version 30000
CMC_TaskSet tensegrity_snake_CMC:
  defaults: CMC_Joint default: on=false weight=(1 1 1) wrt_body=-1 express_body=-1 active=(false false false)
      kp=(1 1 1) kv=(1 1 1) ka=(1 1 1) r0=(0 0 0) r1=(0 0 0) r2=(0 0 0) limit=0
  CMC_Joint rib0_tx: weight=(1 1 1) wrt_body=-1 express_body=-1 active=(true false false) kp=(100 1 1) kv=(20 1 1)
      ka=(1 1 1) r0=(0 0 0) r1=(0 0 0) r2=(0 0 0) coordinate=rib0_tx limit=0
  CMC_Joint rib1_tx: weight=(1 1 1) wrt_body=-1 express_body=-1 active=(true false false) kp=(100 1 1) kv=(20 1 1)
      ka=(1 1 1) r0=(0 0 0) r1=(0 0 0) r2=(0 0 0) coordinate=rib1_tx limit=0
