# OpenSim document version 3000
ForceSet tensegrity_snake_CMC:
  defaults: CoordinateActuator default: optimal_force=1000
  # FX means force x
  CoordinateActuator rib0_to_rib1_bottom_center_reserve: coordinate=rib1_tx optimal_force=1
  CoordinateActuator rib1_to_rib2_bottom_center_reserve: coordinate=rib2_tx optimal_force=1
  CoordinateActuator rib2_to_rib3_bottom_center_reserve: coordinate=rib3_tx optimal_force=1
