# OpenSim document version 30000
ControlSet tensegrity_snake:
  ControlLinear rib0_to_rib1_bottom_center_reserve.excitation: is_model_control=true extrapolate=true default_min=-1000
      default_max=1000 filter_on=false use_steps=true kp=100 kv=20
  ControlLinear rib1_to_rib2_bottom_center_reserve.excitation: is_model_control=true extrapolate=true default_min=-1000
      default_max=1000 filter_on=false use_steps=true kp=100 kv=20
  ControlLinear rib2_to_rib3_bottom_center_reserve.excitation: is_model_control=true extrapolate=true default_min=-1000
      default_max=1000 filter_on=false use_steps=true kp=100 kv=20
