# OpenSim document version 30000
Model tensegrity_snake:
  credits: Author: Victoria Ly
  length_units: meters
  force_units: N
  gravity: 0 -9.80665 0
  BodySet:
    Body ground: mass=0 mass_center=(0 0 0) inertia_xx=1 inertia_yy=1 inertia_zz=1 meshes=plane_display.vtp
    Body rib0: mass=2 mass_center=(-0.031 0 -0.033) inertia_xx=0.1333333 inertia_yy=0.1333333 inertia_zz=0.1333333
        meshes=rib_v1.stl
      # parent_child
      CustomJoint ground_to_rib0: parent_body=ground location_in_parent=(0 0 0) orientation_in_parent=(0 -2.356 0)
          location=(0 0 0)
        Coordinate rib0_tilt: motion_type=rotational default_value=0 range=(-1.570796 1.570796) clamped=false
        Coordinate rib0_list: motion_type=rotational default_value=0 range=(-1.570796 1.570796) clamped=false
        Coordinate rib0_rotation: motion_type=rotational default_value=0 range=(-0.5235988 -0.5235988) clamped=false
        Coordinate rib0_tx: motion_type=translational default_value=0 range=(-5 5) clamped=false
        Coordinate rib0_ty: motion_type=translational default_value=0 range=(-1 2) clamped=false
        Coordinate rib0_tz: motion_type=translational default_value=0 range=(-3 3) clamped=false
        SpatialTransform:
          TransformAxis rotation1: coordinates=rib0_tilt axis=(-1 0 1) LinearFunction(coefficients=1 0)
          TransformAxis rotation2: coordinates=rib0_list axis=(1 0 1) LinearFunction(coefficients=1 0)
          TransformAxis rotation3: coordinates=rib0_rotation axis=(0 1 0) LinearFunction(coefficients=1 0)
          TransformAxis translation1: coordinates=rib0_tx axis=(1 0 1) LinearFunction(coefficients=-1 0)
          TransformAxis translation2: coordinates=rib0_ty axis=(0 1 0) LinearFunction(coefficients=1 0)
          TransformAxis translation3: coordinates=rib0_tz axis=(-1 0 1) LinearFunction(coefficients=-1 0)
    Body rib1: mass=2 mass_center=(-0.031 0 -0.033) inertia_xx=0.1333333 inertia_yy=0.1333333 inertia_zz=0.1333333
        meshes=rib_v1.stl
      # parent_child
      CustomJoint rib0_to_rib1: parent_body=rib0 location_in_parent=(0.01 0 0.01) location=(0 0 0)
        Coordinate rib1_tilt: motion_type=rotational default_value=0 range=(-1.570796 1.570796) clamped=false
        Coordinate rib1_list: motion_type=rotational default_value=0 range=(-1.570796 1.570796) clamped=false
        Coordinate rib1_rotation: motion_type=rotational default_value=0 range=(-0.5235988 0.5235988) clamped=false
        Coordinate rib1_tx: motion_type=translational default_value=0 range=(0 0.011) clamped=false
        Coordinate rib1_ty: motion_type=translational default_value=0 range=(-1 2) clamped=false
        Coordinate rib1_tz: motion_type=translational default_value=0 range=(-3 3) clamped=false
        SpatialTransform:
          TransformAxis rotation1: coordinates=rib1_tilt axis=(-1 0 1) LinearFunction(coefficients=1 0)
          TransformAxis rotation2: coordinates=rib1_list axis=(1 0 1) LinearFunction(coefficients=1 0)
          TransformAxis rotation3: coordinates=rib1_rotation axis=(0 1 0) LinearFunction(coefficients=1 0)
          TransformAxis translation1: coordinates=rib1_tx axis=(1 0 1) LinearFunction(coefficients=-1 0)
          TransformAxis translation2: coordinates=rib1_ty axis=(0 1 0) LinearFunction(coefficients=1 0)
          TransformAxis translation3: coordinates=rib1_tz axis=(-1 0 1) LinearFunction(coefficients=-1 0)
    Body rib2: mass=2 mass_center=(-0.031 0 -0.033) inertia_xx=0.1333333 inertia_yy=0.1333333 inertia_zz=0.1333333
        meshes=rib_v1.stl
      # parent_child
      CustomJoint rib1_to_rib2: parent_body=rib1 location_in_parent=(0.01 0 0.01) location=(0 0 0)
        Coordinate rib2_tilt: motion_type=rotational default_value=0 range=(-1.570796 1.570796) clamped=false
        Coordinate rib2_list: motion_type=rotational default_value=0 range=(-1.570796 1.570796) clamped=false
        Coordinate rib2_rotation: motion_type=rotational default_value=0 range=(-0.5235988 0.5235988) clamped=false
        Coordinate rib2_tx: motion_type=translational default_value=0 range=(0 0.011) clamped=false
        Coordinate rib2_ty: motion_type=translational default_value=0 range=(-1 2) clamped=false
        Coordinate rib2_tz: motion_type=translational default_value=0 range=(-3 3) clamped=false
        SpatialTransform:
          TransformAxis rotation1: coordinates=rib2_tilt axis=(-1 0 1) LinearFunction(coefficients=1 0)
          TransformAxis rotation2: coordinates=rib2_list axis=(1 0 1) LinearFunction(coefficients=1 0)
          TransformAxis rotation3: coordinates=rib2_rotation axis=(0 1 0) LinearFunction(coefficients=1 0)
          TransformAxis translation1: coordinates=rib2_tx axis=(1 0 1) LinearFunction(coefficients=-1 0)
          TransformAxis translation2: coordinates=rib2_ty axis=(0 1 0) LinearFunction(coefficients=1 0)
          TransformAxis translation3: coordinates=rib2_tz axis=(-1 0 1) LinearFunction(coefficients=-1 0)
    Body rib3: mass=2 mass_center=(-0.031 0 -0.033) inertia_xx=0.1333333 inertia_yy=0.1333333 inertia_zz=0.1333333
        meshes=rib_v1.stl
      # parent_to_child
      CustomJoint rib2_to_rib3: parent_body=rib2 location_in_parent=(0.01 0 0.01) location=(0 0 0)
        Coordinate rib3_tilt: motion_type=rotational default_value=0 range=(-1.570796 1.570796) clamped=false
        Coordinate rib3_list: motion_type=rotational default_value=0 range=(-1.570796 1.570796) clamped=false
        Coordinate rib3_rotation: motion_type=rotational default_value=0 range=(-0.5235988 0.5235988) clamped=false
        Coordinate rib3_tx: motion_type=translational default_value=0 range=(0 0.011) clamped=false
        Coordinate rib3_ty: motion_type=translational default_value=0 range=(-1 2) clamped=false
        Coordinate rib3_tz: motion_type=translational default_value=0 range=(-3 3) clamped=false
        SpatialTransform:
          TransformAxis rotation1: coordinates=rib3_tilt axis=(-1 0 1) LinearFunction(coefficients=1 0)
          TransformAxis rotation2: coordinates=rib3_list axis=(1 0 1) LinearFunction(coefficients=1 0)
          TransformAxis rotation3: coordinates=rib3_rotation axis=(0 1 0) LinearFunction(coefficients=1 0)
          TransformAxis translation1: coordinates=rib3_tx axis=(1 0 1) LinearFunction(coefficients=-1 0)
          TransformAxis translation2: coordinates=rib3_ty axis=(0 1 0) LinearFunction(coefficients=1 0)
          TransformAxis translation3: coordinates=rib3_tz axis=(-1 0 1) LinearFunction(coefficients=-1 0)
  ForceSet:
    # Contact force properties for the rib0_bottom_center-plane pair.
    HuntCrossleyForce rib0_bottom_center_plane: transition_velocity=0
      ContactParametersSet:
        ContactParameters: geometry=(rib0_bottom_center_geo plane_geo) stiffness=10000000 dissipation=0
            static_friction=0 dynamic_friction=0 viscous_friction=0
    # Contact force properties for the rib0_bottom_left-plane pair.
    HuntCrossleyForce rib0_bottom_left_plane: transition_velocity=0
      ContactParametersSet:
        ContactParameters: geometry=(rib0_bottom_left_geo plane_geo) stiffness=10000000 dissipation=0 static_friction=0
            dynamic_friction=0 viscous_friction=0
    # Contact force properties for the rib0_bottom_right-plane pair.
    HuntCrossleyForce rib0_bottom_right_plane: transition_velocity=0
      ContactParametersSet:
        ContactParameters: geometry=(rib0_bottom_right_geo plane_geo) stiffness=10000000 dissipation=0
            static_friction=0 dynamic_friction=0 viscous_friction=0
    # Contact force properties for the rib1_bottom_center-plane pair.
    HuntCrossleyForce rib1_bottom_center_plane: transition_velocity=0
      ContactParametersSet:
        ContactParameters: geometry=(rib1_bottom_center_geo plane_geo) stiffness=10000000 dissipation=0
            static_friction=0 dynamic_friction=0 viscous_friction=0
    # Contact force properties for the rib1_bottom_left-plane pair.
    HuntCrossleyForce rib1_bottom_left_plane: transition_velocity=0
      ContactParametersSet:
        ContactParameters: geometry=(rib1_bottom_left_geo plane_geo) stiffness=10000000 dissipation=0 static_friction=0
            dynamic_friction=0 viscous_friction=0
    # Contact force properties for the rib1_bottom_right-plane pair.
    HuntCrossleyForce rib1_bottom_right_plane: transition_velocity=0
      ContactParametersSet:
        ContactParameters: geometry=(rib1_bottom_right_geo plane_geo) stiffness=10000000 dissipation=0
            static_friction=0 dynamic_friction=0 viscous_friction=0
    # Contact force properties for the rib2_bottom_center-plane pair.
    HuntCrossleyForce rib2_bottom_center_plane: transition_velocity=0
      ContactParametersSet:
        ContactParameters: geometry=(rib2_bottom_center_geo plane_geo) stiffness=10000000 dissipation=0
            static_friction=0 dynamic_friction=0 viscous_friction=0
    # Contact force properties for the rib2_bottom_left-plane pair.
    HuntCrossleyForce rib2_bottom_left_plane: transition_velocity=0
      ContactParametersSet:
        ContactParameters: geometry=(rib2_bottom_left_geo plane_geo) stiffness=10000000 dissipation=0 static_friction=0
            dynamic_friction=0 viscous_friction=0
    # Contact force properties for the rib2_bottom_right-plane pair.
    HuntCrossleyForce rib2_bottom_right_plane: transition_velocity=0
      ContactParametersSet:
        ContactParameters: geometry=(rib2_bottom_right_geo plane_geo) stiffness=10000000 dissipation=0
            static_friction=0 dynamic_friction=0 viscous_friction=0
    # Contact force properties for the rib3_bottom_center-plane pair.
    HuntCrossleyForce rib3_bottom_center_plane: transition_velocity=0
      ContactParametersSet:
        ContactParameters: geometry=(rib3_bottom_center_geo plane_geo) stiffness=10000000 dissipation=0
            static_friction=0 dynamic_friction=0 viscous_friction=0
    # Contact force properties for the rib3_bottom_left-plane pair.
    HuntCrossleyForce rib3_bottom_left_plane: transition_velocity=0
      ContactParametersSet:
        ContactParameters: geometry=(rib3_bottom_left_geo plane_geo) stiffness=10000000 dissipation=0 static_friction=0
            dynamic_friction=0 viscous_friction=0
    # Contact force properties for the rib3_bottom_right-plane pair.
    HuntCrossleyForce rib3_bottom_right_plane: transition_velocity=0
      ContactParametersSet:
        ContactParameters: geometry=(rib3_bottom_right_geo plane_geo) stiffness=10000000 dissipation=0
            static_friction=0 dynamic_friction=0 viscous_friction=0
    Thelen2003Muscle [values shared by the 30 below unless stated]: min_control=0 max_control=1 optimal_force=1
        max_isometric_force=1119 optimal_fiber_length=0.0535 tendon_slack_length=0.078
        pennation_angle_at_optimal=0.1396263 [radians] max_contraction_velocity=10 activation_time_constant=0.01
        deactivation_time_constant=0.04 FmaxTendonStrain=0.033 FmaxMuscleStrain=0.6 KshapeActive=0.5 KshapePassive=4
        Af=0.3 Flen=1.8
    Thelen2003Muscle rib0_to_rib1_bottom_center_muscle:
      PathPoint rib0_to_rib1_bottom_center_muscle_origin: rib0 (0 0 0)
      PathPoint rib0_to_rib1_bottom_center_muscle_end: rib1 (0 0 0)
    Thelen2003Muscle rib0_to_rib1_bottom_left_muscle:
      PathPoint rib0_to_rib1_bottom_left_muscle_origin: rib0 (0 0 0.02)
      PathPoint rib0_to_rib1_bottom_left_muscle_end: rib1 (0 0 0.02)
    Thelen2003Muscle rib0_to_rib1_bottom_right_muscle:
      PathPoint rib0_to_rib1_bottom_right_muscle_origin: rib0 (0.02 0 0)
      PathPoint rib0_to_rib1_bottom_right_muscle_end: rib1 (0.02 0 0)
    Thelen2003Muscle rib0_to_rib1_bottom_sideways_left_muscle:
      PathPoint rib0_to_rib1_bottom_sideways_left_muscle_origin: rib0 (0 0 0.02)
      PathPoint rib0_to_rib1_bottom_sideways_left_muscle_end: rib1 (0 0 0)
    Thelen2003Muscle rib0_to_rib1_bottom_sideways_right_muscle:
      PathPoint rib0_to_rib1_bottom_sideways_right_muscle_origin: rib0 (0.02 0 0)
      PathPoint rib0_to_rib1_bottom_sideways_right_muscle_end: rib1 (0 0 0)
    Thelen2003Muscle rib0_to_rib1_top_center_muscle:
      PathPoint rib0_to_rib1_top_center_muscle_origin: rib0 (0 0.02 0)
      PathPoint rib0_to_rib1_top_center_muscle_end: rib1 (0 0.02 0)
    Thelen2003Muscle rib0_to_rib1_top_left_muscle:
      PathPoint rib0_to_rib1_top_left_muscle_origin: rib0 (0 0.02 0.02)
      PathPoint rib0_to_rib1_top_left_muscle_end: rib1 (0 0.02 0.02)
    Thelen2003Muscle rib0_to_rib1_top_right_muscle:
      PathPoint rib0_to_rib1_top_right_muscle_origin: rib0 (0.02 0.02 0)
      PathPoint rib0_to_rib1_top_right_muscle_end: rib1 (0.02 0.02 0)
    Thelen2003Muscle rib0_to_rib1_top_sideways_left_muscle:
      PathPoint rib0_to_rib1_top_sideways_left_origin: rib0 (0 0.02 0.02)
      PathPoint rib0_to_rib1_top_sideways_left_end: rib1 (0 0.02 0)
    Thelen2003Muscle rib0_to_rib1_top_sideways_right_muscle:
      PathPoint rib0_to_rib1_top_sideways_right_origin: rib0 (0.02 0.02 0)
      PathPoint rib0_to_rib1_top_sideways_right_end: rib1 (0 0.02 0)
    # rib1_to_rib2 mucless
    Thelen2003Muscle rib1_to_rib2_bottom_center_muscle:
      PathPoint rib1_to_rib2_bottom_center_muscle_origin: rib1 (0 0 0)
      PathPoint rib1_to_rib2_bottom_center_muscle_end: rib2 (0 0 0)
    Thelen2003Muscle rib1_to_rib2_bottom_left_muscle:
      PathPoint rib1_to_rib2_bottom_left_muscle_origin: rib1 (0 0 0.02)
      PathPoint rib1_to_rib2_bottom_left_muscle_end: rib2 (0 0 0.02)
    Thelen2003Muscle rib1_to_rib2_bottom_right_muscle:
      PathPoint rib1_to_rib2_bottom_right_muscle_origin: rib1 (0.02 0 0)
      PathPoint rib1_to_rib2_bottom_right_muscle_end: rib2 (0.02 0 0)
    Thelen2003Muscle rib1_to_rib2_bottom_sideways_left_muscle:
      PathPoint rib1_to_rib2_bottom_sideways_left_muscle_origin: rib1 (0 0 0.02)
      PathPoint rib1_to_rib2_bottom_sideways_left_muscle_end: rib2 (0 0 0)
    Thelen2003Muscle rib1_to_rib2_bottom_sideways_right_muscle:
      PathPoint rib1_to_rib2_bottom_sideways_right_muscle_origin: rib1 (0.02 0 0)
      PathPoint rib1_to_rib2_bottom_sideways_right_muscle_end: rib2 (0 0 0)
    Thelen2003Muscle rib1_to_rib2_top_center_muscle:
      PathPoint rib1_to_rib2_top_center_muscle_origin: rib1 (0 0.02 0)
      PathPoint rib1_to_rib2_top_center_muscle_end: rib2 (0 0.02 0)
    Thelen2003Muscle rib1_to_rib2_top_left_muscle:
      PathPoint rib1_to_rib2_top_left_muscle_origin: rib1 (0 0.02 0.02)
      PathPoint rib1_to_rib2_top_left_muscle_end: rib2 (0 0.02 0.02)
    Thelen2003Muscle rib1_to_rib2_top_right_muscle:
      PathPoint rib1_to_rib2_top_right_muscle_origin: rib1 (0.02 0.02 0)
      PathPoint rib1_to_rib2_top_right_muscle_end: rib2 (0.02 0.02 0)
    Thelen2003Muscle rib1_to_rib2_top_sideways_left_muscle:
      PathPoint rib1_to_rib2_top_sideways_left_origin: rib1 (0 0.02 0.02)
      PathPoint rib1_to_rib2_top_sideways_left_end: rib2 (0 0.02 0)
    Thelen2003Muscle rib1_to_rib2_top_sideways_right_muscle:
      PathPoint rib1_to_rib2_top_sideways_right_origin: rib1 (0.02 0.02 0)
      PathPoint rib1_to_rib2_top_sideways_right_end: rib2 (0 0.02 0)
    # rib2_to_rib3 mucless
    Thelen2003Muscle rib2_to_rib3_bottom_center_muscle:
      PathPoint rib2_to_rib3_bottom_center_muscle_origin: rib2 (0 0 0)
      PathPoint rib2_to_rib3_bottom_center_muscle_end: rib3 (0 0 0)
    Thelen2003Muscle rib2_to_rib3_bottom_left_muscle:
      PathPoint rib2_to_rib3_bottom_left_muscle_origin: rib2 (0 0 0.02)
      PathPoint rib2_to_rib3_bottom_left_muscle_end: rib3 (0 0 0.02)
    Thelen2003Muscle rib2_to_rib3_bottom_right_muscle:
      PathPoint rib2_to_rib3_bottom_right_muscle_origin: rib2 (0.02 0 0)
      PathPoint rib2_to_rib3_bottom_right_muscle_end: rib3 (0.02 0 0)
    Thelen2003Muscle rib2_to_rib3_bottom_sideways_left_muscle:
      PathPoint rib2_to_rib3_bottom_sideways_left_muscle_origin: rib2 (0 0 0.02)
      PathPoint rib2_to_rib3_bottom_sideways_left_muscle_end: rib3 (0 0 0)
    Thelen2003Muscle rib2_to_rib3_bottom_sideways_right_muscle:
      PathPoint rib2_to_rib3_bottom_sideways_right_muscle_origin: rib2 (0.02 0 0)
      PathPoint rib2_to_rib3_bottom_sideways_right_muscle_end: rib3 (0 0 0)
    Thelen2003Muscle rib2_to_rib3_top_center_muscle:
      PathPoint rib2_to_rib3_top_center_muscle_origin: rib2 (0 0.02 0)
      PathPoint rib2_to_rib3_top_center_muscle_end: rib3 (0 0.02 0)
    Thelen2003Muscle rib2_to_rib3_top_left_muscle:
      PathPoint rib2_to_rib3_top_left_muscle_origin: rib2 (0 0.02 0.02)
      PathPoint rib2_to_rib3_top_left_muscle_end: rib3 (0 0.02 0.02)
    Thelen2003Muscle rib2_to_rib3_top_right_muscle:
      PathPoint rib2_to_rib3_top_right_muscle_origin: rib2 (0.02 0.02 0)
      PathPoint rib2_to_rib3_top_right_muscle_end: rib3 (0.02 0.02 0)
    Thelen2003Muscle rib2_to_rib3_top_sideways_left_muscle:
      PathPoint rib2_to_rib3_top_sideways_left_origin: rib2 (0 0.02 0.02)
      PathPoint rib2_to_rib3_top_sideways_left_end: rib3 (0 0.02 0)
    Thelen2003Muscle rib2_to_rib3_top_sideways_right_muscle:
      PathPoint rib2_to_rib3_top_sideways_right_origin: rib2 (0.02 0.02 0)
      PathPoint rib2_to_rib3_top_sideways_right_end: rib3 (0 0.02 0)
  ContactGeometrySet:
    # ground ContactGeometry
    ContactHalfSpace plane_geo: body_name=ground location=(0 0 0) orientation=(0 0 -1.5708)
    # rib0 ContactGeometries
    ContactSphere rib0_bottom_center_geo: body_name=rib0 location=(0 0 0) radius=0.001
    ContactSphere rib0_bottom_left_geo: body_name=rib0 location=(0 0 0.02) radius=0.001
    ContactSphere rib0_bottom_right_geo: body_name=rib0 location=(0.02 0 0) radius=0.001
    # rib1 ContactGeometries
    ContactSphere rib1_bottom_center_geo: body_name=rib1 location=(0 0 0) radius=0.001
    ContactSphere rib1_bottom_left_geo: body_name=rib1 location=(0 0 0.02) radius=0.001
    ContactSphere rib1_bottom_right_geo: body_name=rib1 location=(0.02 0 0) radius=0.001
    # rib2 ContactGeometries
    ContactSphere rib2_bottom_center_geo: body_name=rib2 location=(0 0 0) radius=0.001
    ContactSphere rib2_bottom_left_geo: body_name=rib2 location=(0 0 0.02) radius=0.001
    ContactSphere rib2_bottom_right_geo: body_name=rib2 location=(0.02 0 0) radius=0.001
    # rib3 ContactGeometries
    ContactSphere rib3_bottom_center_geo: body_name=rib3 location=(0 0 0) radius=0.001
    ContactSphere rib3_bottom_left_geo: body_name=rib3 location=(0 0 0.02) radius=0.001
    ContactSphere rib3_bottom_right_geo: body_name=rib3 location=(0.02 0 0) radius=0.001
