# OpenSim document version 3000
ForceSet tensegrity_snake_CMC:
  # rib1_actuators
  # Apply force at a point in the direction specified in the body frame
  PointActuator rib1_left_side_FX: body=rib1 point=(0 0.005 0.01) point_is_global=false direction=(1 0 0)
      force_is_global=true optimal_force=4
  PointActuator rib1_right_side_FX: body=rib1 point=(0.01 0.005 0) point_is_global=false direction=(1 0 0)
      force_is_global=true optimal_force=4
  # rib2_actuators
  PointActuator rib2_left_side_FX: body=rib2 point=(0 0.005 0.01) point_is_global=false direction=(1 0 0)
      force_is_global=true optimal_force=4
  PointActuator rib2_right_side_FX: body=rib2 point=(0.01 0.005 0) point_is_global=false direction=(1 0 0)
      force_is_global=true optimal_force=4
