# OpenSim document version 30000
ControlSet tensegrity_snake:
  defaults: ControlLinear default: is_model_control=true extrapolate=true default_min=0.02 default_max=1
      filter_on=false use_steps=true kp=100 kv=20
  ControlLinear rib0_to_rib1_left_side_muscle.excitation: is_model_control=true extrapolate=true default_min=0.02
      default_max=1 filter_on=false use_steps=true kp=100 kv=20
  ControlLinear rib0_to_rib1_right_side_muscle.excitation: is_model_control=true extrapolate=true default_min=0.02
      default_max=1 filter_on=false use_steps=true kp=100 kv=20
  ControlLinear rib1_to_rib2_left_side_muscle.excitation: is_model_control=true extrapolate=true default_min=0.02
      default_max=1 filter_on=false use_steps=true kp=100 kv=20
  ControlLinear rib1_to_rib2_right_side_muscle.excitation: is_model_control=true extrapolate=true default_min=0.02
      default_max=1 filter_on=false use_steps=true kp=100 kv=20
