# OpenSim document version 30000
Model tensegrity_snake_new_resting_length:
  credits: Author: Victoria Ly
  length_units: meters
  force_units: N
  gravity: 0 -9.80665 0
  ForceSet:
    # Contact Force Properties for the rib0-plane pair.
    ElasticFoundationForce rib0_plane: transition_velocity=0.1
      ContactParametersSet:
        ContactParameters: geometry=(rib0_geo plane_geo) stiffness=100000000000000 dissipation=10000
            static_friction=0.9 dynamic_friction=0.9 viscous_friction=0.6
    # Contact Force Properties for the rib1-plane pair.
    ElasticFoundationForce rib1_plane: transition_velocity=0.1
      ContactParametersSet:
        ContactParameters: geometry=(rib1_geo plane_geo) stiffness=100000000000000 dissipation=10000
            static_friction=0.9 dynamic_friction=0.9 viscous_friction=0.6
    # Contact Force Properties for the rib2-plane pair.
    ElasticFoundationForce rib2_plane: transition_velocity=0.1
      ContactParametersSet:
        ContactParameters: geometry=(rib2_geo plane_geo) stiffness=100000000000000 dissipation=10000
            static_friction=0.9 dynamic_friction=0.9 viscous_friction=0.6
    # Contact Force Properties for the rib3-plane pair.
    ElasticFoundationForce rib3_plane: transition_velocity=0.1
      ContactParametersSet:
        ContactParameters: geometry=(rib3_geo plane_geo) stiffness=100000000000000 dissipation=10000
            static_friction=0.9 dynamic_friction=0.9 viscous_friction=0.6
    # Contact Force Properties for the rib0-rib1 pair.
    ElasticFoundationForce rib0_rib1: transition_velocity=0.1
      ContactParametersSet:
        ContactParameters: geometry=(rib0_geo rib1_geo) stiffness=100000000000000 dissipation=100000 static_friction=0
            dynamic_friction=0 viscous_friction=0
    # Contact Force Properties for the rib1-rib2 pair.
    ElasticFoundationForce rib1_rib2: transition_velocity=0
      ContactParametersSet:
        ContactParameters: geometry=(rib1_geo rib2_geo) stiffness=100000000000000 dissipation=10000 static_friction=0
            dynamic_friction=0 viscous_friction=0
    # Contact Force Properties for the rib0-rib1 pair.
    ElasticFoundationForce rib2_rib3: transition_velocity=0.1
      ContactParametersSet:
        ContactParameters: geometry=(rib2_geo rib3_geo) stiffness=100000000000000 dissipation=100000 static_friction=0
            dynamic_friction=0 viscous_friction=0
    # rib1_bottom_ligaments
    Ligament [values shared by the 30 below unless stated]: resting_length=0.013 pcsa_force=1500
      force_length_curve: SimmSpline: x=(-1 -0.5 -0.2 0 0.01 0.02 0.03 0.04 0.05 0.06 0.07 0.1 0.13 0.15 0.2 0.4 0.7 1)
          y=(0 0 0 0 0.00083333 0.00333333 0.0075 0.0133333 0.0208333 0.03 0.04 0.07 0.1 0.12 0.17 0.37 0.67 0.97)
    Ligament rib0_to_rib1_bottom_center_ligament:
      PathPoint rib0_to_rib1_bottom_center_ligament_origin: rib0 (0 0 0)
      PathPoint rib0_to_rib1_bottom_center_ligament_end: rib1 (0 0 0)
    Ligament rib0_to_rib1_bottom_left_ligament:
      PathPoint rib0_to_rib1_bottom_left_ligament_origin: rib0 (0 0 0.01)
      PathPoint rib0_to_rib1_bottom_left_ligament_end: rib1 (0 0 0.01)
    Ligament rib0_to_rib1_bottom_right_ligament:
      PathPoint rib0_to_rib1_bottom_right_ligament_origin: rib0 (0.01 0 0)
      PathPoint rib0_to_rib1_bottom_right_ligament_end: rib1 (0.01 0 0)
    Ligament rib0_to_rib1_bottom_sideways_left_ligament:
      PathPoint rib0_to_rib1_bottom_sideways_left_ligament_origin: rib0 (0 0 0.01)
      PathPoint rib0_to_rib1_bottom_sideways_left_ligament_end: rib1 (0 0 0)
    Ligament rib0_to_rib1_bottom_sideways_right_ligament:
      PathPoint rib0_to_rib1_bottom_sideways_right_ligament_origin: rib0 (0.01 0 0)
      PathPoint rib0_to_rib1_bottom_sideways_right_ligament_end: rib1 (0 0 0)
    # rib1_top_ligaments
    Ligament rib0_to_rib1_top_center_ligament:
      PathPoint rib0_to_rib1_top_center_ligament_origin: rib0 (0 0.01 0)
      PathPoint rib0_to_rib1_top_center_ligament_end: rib1 (0 0.01 0)
    Ligament rib0_to_rib1_top_left_ligament:
      PathPoint rib0_to_rib1_top_left_ligament_origin: rib0 (0 0.01 0.01)
      PathPoint rib0_to_rib1_top_left_ligament_end: rib1 (0 0.01 0.01)
    Ligament rib0_to_rib1_top_right_ligament:
      PathPoint rib0_to_rib1_top_right_ligament_origin: rib0 (0.01 0.01 0)
      PathPoint rib0_to_rib1_top_right_ligament_end: rib1 (0.01 0.01 0)
    Ligament rib0_to_rib1_top_sideways_left_ligament:
      PathPoint rib0_to_rib1_top_sideways_left_ligament_origin: rib0 (0 0.01 0.01)
      PathPoint rib0_to_rib1_top_sideways_left_ligament_end: rib1 (0 0.01 0)
    Ligament rib0_to_rib1_top_sideways_right_ligament:
      PathPoint rib0_to_rib1_top_sideways_right_ligament_origin: rib0 (0.01 0.01 0)
      PathPoint rib0_to_rib1_top_sideways_right_ligament_end: rib1 (0 0.01 0)
    # rib1_muscles
    Thelen2003Muscle rib0_to_rib1_center_muscle: min_control=0 max_control=1 optimal_force=1 max_isometric_force=1119
        optimal_fiber_length=0.013 tendon_slack_length=0.011 pennation_angle_at_optimal=0.1396263 [radians]
        max_contraction_velocity=10 activation_time_constant=0.01 deactivation_time_constant=0.04
        FmaxTendonStrain=0.033 FmaxMuscleStrain=0.6 KshapeActive=0.5 KshapePassive=4 Af=0.3 Flen=1.8
      PathPoint rib0_to_rib1_center_muscle_origin: rib0 (0 0.005 0)
      PathPoint rib0_to_rib1_center_muscle_end: rib1 (0 0.005 0)
    # rib2_bottom_ligaments
    Ligament rib1_to_rib2_bottom_center_ligament:
      PathPoint rib1_to_rib2_bottom_center_ligament_origin: rib1 (0 0 0)
      PathPoint rib1_to_rib2_bottom_center_ligament_end: rib2 (0 0 0)
    Ligament rib1_to_rib2_bottom_left_ligament:
      PathPoint rib1_to_rib2_bottom_left_ligament_origin: rib1 (0 0 0.01)
      PathPoint rib1_to_rib2_bottom_left_ligament_end: rib2 (0 0 0.01)
    Ligament rib1_to_rib2_bottom_right_ligament:
      PathPoint rib1_to_rib2_bottom_right_ligament_origin: rib1 (0.01 0 0)
      PathPoint rib1_to_rib2_bottom_right_ligament_end: rib2 (0.01 0 0)
    Ligament rib1_to_rib2_bottom_sideways_left_ligament:
      PathPoint rib1_to_rib2_bottom_sideways_left_ligament_origin: rib1 (0 0 0.01)
      PathPoint rib1_to_rib2_bottom_sideways_left_ligament_end: rib2 (0 0 0)
    Ligament rib1_to_rib2_bottom_sideways_right_ligament:
      PathPoint rib1_to_rib2_bottom_sideways_right_ligament_origin: rib1 (0.01 0 0)
      PathPoint rib1_to_rib2_bottom_sideways_right_ligament_end: rib2 (0 0 0)
    # rib2_top_ligaments
    Ligament rib1_to_rib2_top_center_ligament:
      PathPoint rib1_to_rib2_top_center_ligament_origin: rib1 (0 0.01 0)
      PathPoint rib1_to_rib2_top_center_ligament_end: rib2 (0 0.01 0)
    Ligament rib1_to_rib2_top_left_ligament:
      PathPoint rib1_to_rib2_top_left_ligament_origin: rib1 (0 0.01 0.01)
      PathPoint rib1_to_rib2_top_left_ligament_end: rib2 (0 0.01 0.01)
    Ligament rib1_to_rib2_top_right_ligament:
      PathPoint rib1_to_rib2_top_right_ligament_origin: rib1 (0.01 0.01 0)
      PathPoint rib1_to_rib2_top_right_ligament_end: rib2 (0.01 0.01 0)
    Ligament rib1_to_rib2_top_sideways_left_ligament:
      PathPoint rib1_to_rib2_top_sideways_left_ligament_origin: rib1 (0 0.01 0.01)
      PathPoint rib1_to_rib2_top_sideways_left_ligament_end: rib2 (0 0.01 0)
    Ligament rib1_to_rib2_top_sideways_right_ligament:
      PathPoint rib1_to_rib2_top_sideways_right_ligament_origin: rib1 (0.01 0.01 0)
      PathPoint rib1_to_rib2_top_sideways_right_ligament_end: rib2 (0 0.01 0)
    # rib2_muscles
    Thelen2003Muscle rib1_to_rib2_left_side_muscle: min_control=0 max_control=1 optimal_force=1
        max_isometric_force=1119 optimal_fiber_length=0.013 tendon_slack_length=0.011
        pennation_angle_at_optimal=0.1396263 max_contraction_velocity=10 activation_time_constant=0.01
        deactivation_time_constant=0.04 FmaxTendonStrain=0.033 FmaxMuscleStrain=0.6 KshapeActive=0.5 KshapePassive=4
        Af=0.3 Flen=1.8
      PathPoint rib1_to_rib2_left_side_muscle_origin: rib1 (0 0.005 0.01)
      PathPoint rib1_to_rib2_left_side_muscle_end: rib2 (0 0.005 0.01)
    Thelen2003Muscle rib1_to_rib2_right_side_muscle: min_control=0 max_control=1 optimal_force=1
        max_isometric_force=1119 optimal_fiber_length=0.013 tendon_slack_length=0.011
        pennation_angle_at_optimal=0.1396263 max_contraction_velocity=10 activation_time_constant=0.01
        deactivation_time_constant=0.04 FmaxTendonStrain=0.033 FmaxMuscleStrain=0.6 KshapeActive=0.5 KshapePassive=4
        Af=0.3 Flen=1.8
      PathPoint rib1_to_rib2_right_side_muscle_origin: rib1 (0.01 0.005 0)
      PathPoint rib1_to_rib2_right_side_muscle_end: rib2 (0.01 0.005 0)
    # rib3_bottom_ligaments
    Ligament rib2_to_rib3_bottom_center_ligament:
      PathPoint rib2_to_rib3_bottom_center_ligament_origin: rib2 (0 0 0)
      PathPoint rib2_to_rib3_bottom_center_ligament_end: rib3 (0 0 0)
    Ligament rib2_to_rib3_bottom_left_ligament:
      PathPoint rib2_to_rib3_bottom_left_ligament_origin: rib2 (0 0 0.01)
      PathPoint rib2_to_rib3_bottom_left_ligament_end: rib3 (0 0 0.01)
    Ligament rib2_to_rib3_bottom_right_ligament:
      PathPoint rib2_to_rib3_bottom_right_ligament_origin: rib2 (0.01 0 0)
      PathPoint rib2_to_rib3_bottom_right_ligament_end: rib3 (0.01 0 0)
    Ligament rib2_to_rib3_bottom_sideways_left_ligament:
      PathPoint rib2_to_rib3_bottom_sideways_left_ligament_origin: rib2 (0 0 0.01)
      PathPoint rib2_to_rib3_bottom_sideways_left_ligament_end: rib3 (0 0 0)
    Ligament rib2_to_rib3_bottom_sideways_right_ligament:
      PathPoint rib2_to_rib3_bottom_sideways_right_ligament_origin: rib2 (0.01 0 0)
      PathPoint rib2_to_rib3_bottom_sideways_right_ligament_end: rib3 (0 0 0)
    # rib3_top_ligaments
    Ligament rib2_to_rib3_top_center_ligament:
      PathPoint rib2_to_rib3_top_center_ligament_origin: rib2 (0 0.01 0)
      PathPoint rib2_to_rib3_top_center_ligament_end: rib3 (0 0.01 0)
    Ligament rib2_to_rib3_top_left_ligament:
      PathPoint rib2_to_rib3_top_left_ligament_origin: rib2 (0 0.01 0.01)
      PathPoint rib2_to_rib3_top_left_ligament_end: rib3 (0 0.01 0.01)
    Ligament rib2_to_rib3_top_right_ligament:
      PathPoint rib2_to_rib3_top_right_ligament_origin: rib2 (0.01 0.01 0)
      PathPoint rib2_to_rib3_top_right_ligament_end: rib3 (0.01 0.01 0)
    Ligament rib2_to_rib3_top_sideways_left_ligament:
      PathPoint rib2_to_rib3_top_sideways_left_ligament_origin: rib2 (0 0.01 0.01)
      PathPoint rib2_to_rib3_top_sideways_left_ligament_end: rib3 (0 0.01 0)
    Ligament rib2_to_rib3_top_sideways_right_ligament:
      PathPoint rib2_to_rib3_top_sideways_right_ligament_origin: rib2 (0.01 0.01 0)
      PathPoint rib2_to_rib3_top_sideways_right_ligament_end: rib3 (0 0.01 0)
  BodySet:
    Body ground: mass=0 mass_center=(0 0 0) inertia_xx=1 inertia_yy=1 inertia_zz=1 meshes=plane_display.vtp
    Body rib0: mass=2 mass_center=(0 0 0) inertia_xx=0.1333333 inertia_yy=0.1333333 inertia_zz=0.1333333
        meshes=rib_v1.stl
      # parent_child
      CustomJoint ground_to_rib0: parent_body=ground location_in_parent=(0 0 0) orientation_in_parent=(0 -2.356 0)
          location=(0 0 0)
        Coordinate rib0_tilt: motion_type=rotational default_value=0 range=(-0.5235988 0.5235988) clamped=false
        Coordinate rib0_list: motion_type=rotational default_value=0 range=(-0.5235988 0.5235988) clamped=false
        Coordinate rib0_rotation: motion_type=rotational default_value=0 range=(-0.5235988 0.5235988) clamped=false
        Coordinate rib0_tx: motion_type=translational default_value=0 range=(0 0.01) clamped=false
        Coordinate rib0_ty: motion_type=translational default_value=0 range=(0 0.005) clamped=false
        Coordinate rib0_tz: motion_type=translational default_value=0 range=(-0.005 0.005) clamped=false
        SpatialTransform:
          TransformAxis rotation1: coordinates=rib0_tilt axis=(-1 0 1) LinearFunction(coefficients=1 0)
          TransformAxis rotation2: coordinates=rib0_list axis=(1 0 1) LinearFunction(coefficients=1 0)
          TransformAxis rotation3: coordinates=rib0_rotation axis=(0 1 0) LinearFunction(coefficients=1 0)
          TransformAxis translation1: coordinates=rib0_tx axis=(1 0 1) LinearFunction(coefficients=-1 0)
          TransformAxis translation2: coordinates=rib0_ty axis=(0 1 0) LinearFunction(coefficients=1 0)
          TransformAxis translation3: coordinates=rib0_tz axis=(-1 0 1) LinearFunction(coefficients=-1 0)
    Body rib1: mass=2 mass_center=(0 0 0) inertia_xx=0.1333333 inertia_yy=0.1333333 inertia_zz=0.1333333
        meshes=rib_v1.stl
      # parent_child
      CustomJoint rib0_to_rib1: parent_body=rib0 location_in_parent=(0.0075 0 0.0075) location=(0 0 0)
        Coordinate rib1_tilt: motion_type=rotational default_value=0 range=(-0.5235988 0.5235988) clamped=false
        Coordinate rib1_list: motion_type=rotational default_value=0 range=(-0.5235988 0.5235988) clamped=false
        Coordinate rib1_rotation: motion_type=rotational default_value=0 range=(-0.5235988 0.5235988) clamped=false
        Coordinate rib1_tx: motion_type=translational default_value=0 range=(0 0.01) clamped=false
        Coordinate rib1_ty: motion_type=translational default_value=0 range=(0 0.005) clamped=false
        Coordinate rib1_tz: motion_type=translational default_value=0 range=(-0.005 0.005) clamped=false
        SpatialTransform:
          TransformAxis rotation1: coordinates=rib1_tilt axis=(-1 0 1) LinearFunction(coefficients=1 0)
          TransformAxis rotation2: coordinates=rib1_list axis=(1 0 1) LinearFunction(coefficients=1 0)
          TransformAxis rotation3: coordinates=rib1_rotation axis=(0 1 0) LinearFunction(coefficients=1 0)
          TransformAxis translation1: coordinates=rib1_tx axis=(1 0 1) LinearFunction(coefficients=-1 0)
          TransformAxis translation2: coordinates=rib1_ty axis=(0 1 0) LinearFunction(coefficients=1 0)
          TransformAxis translation3: coordinates=rib1_tz axis=(-1 0 1) LinearFunction(coefficients=-1 0)
    Body rib2: mass=2 mass_center=(0 0 0) inertia_xx=0.1333333 inertia_yy=0.1333333 inertia_zz=0.1333333
        meshes=rib_v1.stl
      # parent_child
      CustomJoint rib1_to_rib2: parent_body=rib1 location_in_parent=(0.0075 0 0.0075) location=(0 0 0)
        Coordinate rib2_tilt: motion_type=rotational default_value=0 range=(-0.5235988 0.5235988) clamped=false
        Coordinate rib2_list: motion_type=rotational default_value=0 range=(-0.5235988 0.5235988) clamped=false
        Coordinate rib2_rotation: motion_type=rotational default_value=0 range=(-0.5235988 0.5235988) clamped=false
        Coordinate rib2_tx: motion_type=translational default_value=0 range=(0 0.01) clamped=false
        Coordinate rib2_ty: motion_type=translational default_value=0 range=(0 0.005) clamped=false
        Coordinate rib2_tz: motion_type=translational default_value=0 range=(-0.005 0.005) clamped=false
        SpatialTransform:
          TransformAxis rotation1: coordinates=rib2_tilt axis=(-1 0 1) LinearFunction(coefficients=1 0)
          TransformAxis rotation2: coordinates=rib2_list axis=(1 0 1) LinearFunction(coefficients=1 0)
          TransformAxis rotation3: coordinates=rib2_rotation axis=(0 1 0) LinearFunction(coefficients=1 0)
          TransformAxis translation1: coordinates=rib2_tx axis=(1 0 1) LinearFunction(coefficients=-1 0)
          TransformAxis translation2: coordinates=rib2_ty axis=(0 1 0) LinearFunction(coefficients=1 0)
          TransformAxis translation3: coordinates=rib2_tz axis=(-1 0 1) LinearFunction(coefficients=-1 0)
    Body rib3: mass=2 mass_center=(0 0 0) inertia_xx=0.1333333 inertia_yy=0.1333333 inertia_zz=0.1333333
        meshes=rib_v1.stl
      # parent_child
      CustomJoint rib2_to_rib3: parent_body=rib2 location_in_parent=(0.0075 0 0.0075) location=(0 0 0)
        Coordinate rib3_tilt: motion_type=rotational default_value=0 range=(-0.5235988 0.5235988) clamped=false
        Coordinate rib3_list: motion_type=rotational default_value=0 range=(-0.5235988 0.5235988) clamped=false
        Coordinate rib3_rotation: motion_type=rotational default_value=0 range=(-0.5235988 0.5235988) clamped=false
        Coordinate rib3_tx: motion_type=translational default_value=0 range=(0 0.01) clamped=false
        Coordinate rib3_ty: motion_type=translational default_value=0 range=(0 0.005) clamped=false
        Coordinate rib3_tz: motion_type=translational default_value=0 range=(-0.005 0.005) clamped=false
        SpatialTransform:
          TransformAxis rotation1: coordinates=rib3_tilt axis=(-1 0 1) LinearFunction(coefficients=1 0)
          TransformAxis rotation2: coordinates=rib3_list axis=(1 0 1) LinearFunction(coefficients=1 0)
          TransformAxis rotation3: coordinates=rib3_rotation axis=(0 1 0) LinearFunction(coefficients=1 0)
          TransformAxis translation1: coordinates=rib3_tx axis=(1 0 1) LinearFunction(coefficients=-1 0)
          TransformAxis translation2: coordinates=rib3_ty axis=(0 1 0) LinearFunction(coefficients=1 0)
          TransformAxis translation3: coordinates=rib3_tz axis=(-1 0 1) LinearFunction(coefficients=-1 0)
  ConstraintSet:
    PointOnLineConstraint lock_rib0_to_x_axis: line_body=ground line_direction_vec=(1 0 0) point_on_line=(0 0 0)
        follower_body=rib0 point_on_follower=(0 0 0)
    PointOnLineConstraint lock_rib1_to_x_axis: line_body=ground line_direction_vec=(1 0 0) point_on_line=(0 0 0)
        follower_body=rib1 point_on_follower=(0 0 0)
    PointOnLineConstraint lock_rib2_to_x_axis: line_body=ground line_direction_vec=(1 0 0) point_on_line=(0 0 0)
        follower_body=rib2 point_on_follower=(0 0 0)
    PointOnLineConstraint lock_rib3_to_x_axis: line_body=ground line_direction_vec=(1 0 0) point_on_line=(0 0 0)
        follower_body=rib3 point_on_follower=(0 0 0)
  ContactGeometrySet:
    # ground ContactGeometry
    ContactHalfSpace plane_geo: body_name=ground location=(0 0 0) orientation=(0 0 -1.5708)
    ContactMesh rib0_geo: body_name=rib0 location=(-0.0003 -0.001 -0.0003) filename=tiny_rib.stl
    ContactMesh rib1_geo: body_name=rib1 location=(-0.0003 -0.001 -0.0003) filename=tiny_rib.stl
    ContactMesh rib2_geo: body_name=rib2 location=(-0.0003 -0.001 -0.0003) filename=tiny_rib.stl
    ContactMesh rib3_geo: body_name=rib3 location=(-0.0003 -0.001 -0.0003) filename=tiny_rib.stl
