# OpenSim document version 30000
Model tensegrity_snake:
  credits: Author: Victoria Ly
  length_units: meters
  force_units: N
  gravity: 0 -9.80665 0
  BodySet:
    Body ground: mass=0 mass_center=(0 0 0) inertia_xx=1 inertia_yy=1 inertia_zz=1 meshes=checkered_floor.vtp
    Body rib_0: mass=2 mass_center=(-0.031 0 -0.033) inertia_xx=0.1333333 inertia_yy=0.1333333 inertia_zz=0.1333333
        meshes=rib_v1.stl
      # parent_child
      CustomJoint ground_rib0: parent_body=ground location_in_parent=(0 0 0) orientation_in_parent=(0 -2.356 0)
          location=(0 0 0)
        Coordinate rib0_tilt: motion_type=rotational default_value=0 range=(-1.570796 1.570796) clamped=false
        Coordinate rib0_list: motion_type=rotational default_value=0 range=(-1.570796 1.570796) clamped=false
        Coordinate rib0_rotation: motion_type=rotational default_value=0 range=(-3.926991 1.570796) clamped=false
        Coordinate rib0_tx: motion_type=translational default_value=0 range=(-5 5) clamped=false
        Coordinate rib0_ty: motion_type=translational default_value=0 range=(-1 2) clamped=false
        Coordinate rib0_tz: motion_type=translational default_value=0 range=(-3 3) clamped=false
        SpatialTransform:
          TransformAxis rotation1: coordinates=rib0_tilt axis=(-1 0 1) LinearFunction(coefficients=1 0)
          TransformAxis rotation2: coordinates=rib0_list axis=(1 0 1) LinearFunction(coefficients=1 0)
          TransformAxis rotation3: coordinates=rib0_rotation axis=(0 1 0) LinearFunction(coefficients=1 0)
          TransformAxis translation1: coordinates=rib0_tx axis=(1 0 1) LinearFunction(coefficients=-1 0)
          TransformAxis translation2: coordinates=rib0_ty axis=(0 1 0) LinearFunction(coefficients=1 0)
          TransformAxis translation3: coordinates=rib0_tz axis=(-1 0 1) LinearFunction(coefficients=1 0)
