# OpenSim document version 30000
Model tensegrity_snake:
  credits: Author: Victoria Ly
  length_units: meters
  force_units: N
  gravity: 0 -9.80665 0
  BodySet:
    Body ground: mass=0 mass_center=(0 0 0) inertia_xx=1 inertia_yy=1 inertia_zz=1 meshes=checkered_floor.vtp
    Body rib0: mass=2 mass_center=(0 0.25 0) inertia_xx=0.1333333 inertia_yy=0.1333333 inertia_zz=0.1333333
        meshes=rib_v1.stl
      # parent_child
      CustomJoint ground_to_rib0: parent_body=ground location_in_parent=(0 0 0) orientation_in_parent=(0 -2.356 0)
          location=(0 0 0)
        Coordinate rib0_tilt: motion_type=rotational default_value=0 range=(-1.570796 1.570796) clamped=false
        Coordinate rib0_list: motion_type=rotational default_value=0 range=(-1.570796 1.570796) clamped=false
        Coordinate rib0_rotation: motion_type=rotational default_value=0 range=(-0.5235988 -0.5235988) clamped=false
        Coordinate rib0_tx: motion_type=translational default_value=0 range=(-5 5) clamped=false
        Coordinate rib0_ty: motion_type=translational default_value=0 range=(-1 2) clamped=false
        Coordinate rib0_tz: motion_type=translational default_value=0 range=(-3 3) clamped=false
        SpatialTransform:
          TransformAxis rotation1: coordinates=rib0_tilt axis=(-1 0 1) LinearFunction(coefficients=1 0)
          TransformAxis rotation2: coordinates=rib0_list axis=(1 0 1) LinearFunction(coefficients=1 0)
          TransformAxis rotation3: coordinates=rib0_rotation axis=(0 1 0) LinearFunction(coefficients=1 0)
          TransformAxis translation1: coordinates=rib0_tx axis=(1 0 1) LinearFunction(coefficients=-1 0)
          TransformAxis translation2: coordinates=rib0_ty axis=(0 1 0) LinearFunction(coefficients=1 0)
          TransformAxis translation3: coordinates=rib0_tz axis=(-1 0 1) LinearFunction(coefficients=-1 0)
    Body rib1: mass=2 mass_center=(0 0.25 0) inertia_xx=0.1333333 inertia_yy=0.1333333 inertia_zz=0.1333333
        meshes=rib_v1.stl
      # parent_child
      CustomJoint rib0_to_rib1: parent_body=rib0 location_in_parent=(0.01 0 0.01) location=(0 0 0)
        Coordinate rib1_tilt: motion_type=rotational default_value=0 range=(0 1.570796) clamped=false
        Coordinate rib1_list: motion_type=rotational default_value=0 range=(-1.570796 1.570796) clamped=false
        Coordinate rib1_rotation: motion_type=rotational default_value=0 range=(-0.5235988 0.5235988) clamped=false
        Coordinate rib1_tx: motion_type=translational default_value=0 range=(0 0.011) clamped=false
        Coordinate rib1_ty: motion_type=translational default_value=0 range=(-1 2) clamped=false
        Coordinate rib1_tz: motion_type=translational default_value=0 range=(-3 3) clamped=false
        SpatialTransform:
          TransformAxis rotation1: coordinates=rib1_tilt axis=(-1 0 1) LinearFunction(coefficients=1 0)
          TransformAxis rotation2: coordinates=rib1_list axis=(1 0 1) LinearFunction(coefficients=1 0)
          TransformAxis rotation3: coordinates=rib1_rotation axis=(0 1 0) LinearFunction(coefficients=1 0)
          TransformAxis translation1: coordinates=rib1_tx axis=(1 0 1) LinearFunction(coefficients=-1 0)
          TransformAxis translation2: coordinates=rib1_ty axis=(0 1 0) LinearFunction(coefficients=1 0)
          TransformAxis translation3: coordinates=rib1_tz axis=(-1 0 1) LinearFunction(coefficients=-1 0)
  ConstraintSet:
    WeldConstraint rib0_ground_constraint: body_1=rib0 body_2=ground location_body_1=(0 0 0) orientation_body_1=(0 0 0)
        location_body_2=(0 0 0) orientation_body_2=(0 0 0)
    PointOnLineConstraint lock_rib0_to_x_axis: line_body=ground line_direction_vec=(1 0 1) point_on_line=(0 0 0)
        follower_body=rib0 point_on_follower=(0 0 0)
    PointOnLineConstraint lock_rib1_to_x_axis: line_body=ground line_direction_vec=(1 0 1) point_on_line=(0 0 0)
        follower_body=rib1 point_on_follower=(0 0 0)
